// SBML level 2 version 4

function function_4_cL_m_degr_1(D, L, cL_m, def, m1, m2)
  (m1*L + m2*D)*cL_m/def;
end

function function_4_cL_trsl_1(L, cL_m, def, p1, p2)
  cL_m*(p1*L + p2)/def;
end

function function_4_cL_degr_1(c, cL, def, g3, m3, p3)
  (m3*cL + p3*cL^c/(cL^c + g3^c))/def;
end

function function_4_cL_modif_1(c, cL, def, g3, p3)
  p3*cL^c/(cL^c + g3^c)/def;
end

function function_4_cLm_degr_1(cLm, def, m4)
  m4*cLm/def;
end

function function_4_cP_trsl_1(D, cP, def, p7)
  p7*D*(1 - cP)/def;
end

function function_4_cP_degr_1(L, cP, def, m11)
  m11*cP*L/def;
end

function function_4_cP9_m_trscr(L, cEC, cL, cP, def, e, g8, g9, n4, n7, q3)
  (L*q3*cP + (n4 + n7*cL^e/(cL^e + g9^e))*g8/(cEC + g8))/def;
end

function function_4_cP9_m_degr_1(cP9_m, def, m12)
  m12*cP9_m/def;
end

function function_4_cP9_trsl_1(cP9_m, def, p8)
  p8*cP9_m/def;
end

function function_4_cP9_degr_1(D, cP9, def, m13, m22)
  (m13 + m22*D)*cP9/def;
end

function function_4_cP7_m_trscr_1(cL, cLm, cP9, def, e, f, g10, g11, n8, n9)
  (n8*(cLm + cL)^e/((cLm + cL)^e + g10^e) + n9*cP9^f/(cP9^f + g11^f))/def;
end

function function_4_cP7_m_degr_1(cP7_m, def, m14)
  m14*cP7_m/def;
end

function function_4_cP7_trsl_1(cP7_m, def, p9)
  p9*cP7_m/def;
end

function function_4_cP7_degr_1(D, cP7, def, m15, m23)
  (m15 + m23*D)*cP7/def;
end

function function_4_cNI_m_trscr_1(b, cLm, cP7, def, e, g12, g13, n10, n11)
  (n10*cLm^e/(cLm^e + g12^e) + n11*cP7^b/(cP7^b + g13^b))/def;
end

function function_4_cNI_m_degr_1(cNI_m, def, m16)
  m16*cNI_m/def;
end

function function_4_cNI_trsl_1(cNI_m, def, p10)
  p10*cNI_m/def;
end

function function_4_cNI_degr_1(D, cNI, def, m17, m24)
  (m17 + m24*D)*cNI/def;
end

function function_4_cT_m_trscr(cEC, cL, def, e, g4, g5, n2)
  n2*g4/(cEC + g4)*g5^e/(cL^e + g5^e)/def;
end

function function_4_cT_m_degr_1(cT_m, def, m5)
  m5*cT_m/def;
end

function function_4_cT_trsl_1(cT_m, def, p4)
  p4*cT_m/def;
end

function function_4_cT_degr_1(D, cT, cZG, cZTL, def, m6, m7, m8, p5)
  ((m6 + m7*D)*cT*(p5*cZTL + cZG) + m8*cT)/def;
end

function function_4_cE4_m_trscr_1(cEC, cL, def, e, g2, g6, n13)
  n13*g2/(cEC + g2)*g6^e/(cL^e + g6^e)/def;
end

function function_4_cE4_m_degr_1(cE4_m, def, m34)
  m34*cE4_m/def;
end

function function_4_cE4_trsl_1(cE4_m, def, p23)
  p23*cE4_m/def;
end

function function_4_cE4_degr_1(cCOP1d, cCOP1n, cE3n, cE4, cLUX, def, m35, m36, m37, p21, p25, p26)
  (m35*cE4 + p25*cE4*cE3n - p21*p25*cE4*cE3n/(p26*cLUX + p21 + m37*cCOP1d + m36*cCOP1n))/def;
end

function function_4_cE3_m_trscr_1(cL, def, e, g16, n3)
  n3*g16^e/(cL^e + g16^e)/def;
end

function function_4_cE3_m_degr_1(cE3_m, def, m26)
  m26*cE3_m/def;
end

function function_4_cE3_trsl_1(cE3_m, def, p16)
  p16*cE3_m/def;
end

function function_4_cE3_degr_1(cCOP1c, cE3, def, m9)
  m9*cE3*cCOP1c/def;
end

function function_4_cE3n_import_1(cE3, cE3n, def, p19, p20)
  (p19*cE3 - p20*cE3n)/def;
end

function function_4_cE3n_degr_1(cCOP1d, cCOP1n, cE3n, cE4, cG, cLUX, def, m19, m29, m30, m36, m37, p17, p21, p25, p26, p28, p29)
  (m29*cE3n*cCOP1n + m30*cE3n*cCOP1d + p25*cE4*cE3n - p21*p25*cE4*cE3n/(p26*cLUX + p21 + m37*cCOP1d + m36*cCOP1n) + p17*cE3n*p28*cG/(p29 + m19 + p17*cE3n))/def;
end

function function_4_cLUX_m_degr_1(cLUX_m, def, m34)
  m34*cLUX_m/def;
end

function function_4_cLUX_trsl_1(cLUX_m, def, p27)
  p27*cLUX_m/def;
end

function function_4_cLUX_degr_1(cCOP1d, cCOP1n, cE3n, cE4, cLUX, def, m36, m37, m39, p21, p25, p26)
  (m39*cLUX + p26*cLUX*p25*cE4*cE3n/(p26*cLUX + p21 + m37*cCOP1d + m36*cCOP1n))/def;
end

function function_4_cCOP1c_trsl_1(def, n5)
  n5/def;
end

function function_4_cCOP1n_import_1(cCOP1c, def, p6)
  p6*cCOP1c/def;
end

function function_4_cCOP1n_degr_1(L, cCOP1n, def, m27, p15)
  m27*cCOP1n*(1 + p15*L)/def;
end

function function_4_cCOP1d_activ_1(L, cCOP1n, cP, def, n14, n6)
  (n6*L*cP*cCOP1n + n14*cCOP1n)/def;
end

function function_4_cCOP1d_degr_1(D, cCOP1d, def, m31, m33)
  m31*(1 + m33*D)*cCOP1d/def;
end

function function_4_cG_m_trscr(L, cEC, cL, cP, def, e, g14, g15, n12, q2)
  (L*q2*cP + n12*g14/(cEC + g14)*g15^e/(cL^e + g15^e))/def;
end

function function_4_cG_m_degr_1(cG_m, def, m18)
  m18*cG_m/def;
end

function function_4_cG_trsl_1(cG_m, def, p11)
  p11*cG_m/def;
end

function function_4_cG_degr_1(cE3n, cG, def, m19, p17, p28, p29)
  (m19*cG + p28*cG - p29*p28*cG/(p29 + m19 + p17*cE3n))/def;
end

function function_4_cG_cZTL_assoc_1(D, L, cG, cZG, cZTL, def, p12, p13)
  (p12*L*cZTL*cG - p13*D*cZG)/def;
end

function function_4_cZTL_trsl_1(def, p14)
  p14/def;
end

function function_4_cZTL_degr_1(cZTL, def, m20)
  m20*cZTL/def;
end

function function_4_cZG_degr_1(cZG, def, m21)
  m21*cZG/def;
end

function function_4_cG_cE3_assoc_1(cE3, cG, def, p17)
  p17*cE3*cG/def;
end

function function_4_cEG_degr_1(cCOP1c, cCOP1d, cCOP1n, cE3n, cEG, cG, def, m10, m19, m9, p17, p18, p28, p29, p31)
  (m9*cEG*cCOP1c + p18*cEG - p31*(p18*cEG + p17*cE3n*p28*cG/(p29 + m19 + p17*cE3n))/(m9*cCOP1n + m10*cCOP1d + p31))/def;
end

function function_4_cEC_form_1(cCOP1d, cCOP1n, cE3n, cE4, cLUX, def, m36, m37, p21, p25, p26)
  p26*cLUX*p25*cE4*cE3n/(p26*cLUX + p21 + m37*cCOP1d + m36*cCOP1n)/def;
end

function function_4_cEC_degr_1(L, cCOP1d, cCOP1n, cE3n, cEC, cEG, cG, d, def, g7, m10, m19, m32, m36, m37, m9, p17, p18, p24, p28, p29, p31)
  (m36*cCOP1n*cEC + m37*cCOP1d*cEC + m32*cEC*(1 + p24*L*(p28*cG/(p29 + m19 + p17*cE3n) + (p18*cEG + p17*cE3n*p28*cG/(p29 + m19 + p17*cE3n))/(m9*cCOP1n + m10*cCOP1d + p31))^d/((p28*cG/(p29 + m19 + p17*cE3n) + (p18*cEG + p17*cE3n*p28*cG/(p29 + m19 + p17*cE3n))/(m9*cCOP1n + m10*cCOP1d + p31))^d + g7^d)))/def;
end

function function_4_cL_m_trscr_1(L, a, cNI, cP, cP7, cP9, cT, def, g1, n1, q1)
  (L*q1*cP + n1)*g1^a/((cP9 + cP7 + cNI + cT)^a + g1^a)/def;
end

function function_4_cCOP1c_degr_1(L, cCOP1c, def, m27, p15)
  m27*cCOP1c*(1 + p15*L)/def;
end

function function_Y_syn(L, ksY)
  (1 - L)*ksY;
end

function function_Y_deg(L, Y, kdY)
  L*Y*kdY;
end

function function_T_syn(L, ksT1, ksT2, cL, cLm, KsT2)
  L*(ksT1 + ksT2*(cL + cLm)^2/(KsT2^2 + (cL + cLm)^2));
end

function function_T_deg(L, kdT1, kdT2, T, KdT2)
  (L*kdT1 + kdT2/(T + KdT2))*T;
end

function function_X_syn(ksX, S)
  ksX*S;
end

function function_X_deg(kdX, X, T)
  kdX*X*T;
end

function function_S_syn(ksS, L, Y, KsS)
  ksS*L*Y/(Y + KsS);
end

function function_S_deg(L, kdS, X, KdSX, S, KdS)
  (1 - L)*kdS*(X/(KdSX + X))*S/(S + KdS);
end

model Model_1()
  // Starch Model 2

  // Compartments:
  compartment def = 1;

  // Species:
  species cCOP1c in def = 0.3268803;
  species cCOP1d in def = 0.2568402;
  species cCOP1n in def = 0.6496795;
  species cE3 in def = 0.1084735;
  species cE3_m in def = 0.2014155;
  species cE3n in def = 0.02166674;
  species cE4 in def = 0.1532067;
  species cE4_m in def = 0.06507569;
  species cEC in def = 0.05909944;
  species cEG in def = 0.002516584;
  species cG in def = 0.01645868;
  species cG_m in def = 0.07840014;
  species cL in def = 0.7259155;
  species cLUX in def = 0.4374725;
  species cLUX_m in def = 0.06507569;
  species cL_m in def = 1.174767;
  species cLm in def = 0.1223812;
  species cNI in def = 0.07481334;
  species cNI_m in def = 0.126423;
  species cP in def = 0.9559252;
  species cP7 in def = 0.1769663;
  species cP7_m in def = 0.592736;
  species cP9 in def = 0.02679347;
  species cP9_m in def = 0.07252474;
  species cT in def = 0.03141185;
  species cT_m in def = 0.07057193;
  species cZG in def = 0.08484157;
  species cZTL in def = 0.2527948;
  species T in def = 0.3201391;
  species X in def = 2.152796;
  species Y in def = 56.20295;
  species S in def = 0.5114799;

  // Parameters:
  n1 = 2.6;
  n2 = 0.64;
  n3 = 0.29;
  n4 = 0.07;
  n5 = 0.23;
  n6 = 20;
  n7 = 0.2;
  n8 = 0.5;
  n9 = 0.2;
  n10 = 0.4;
  n11 = 0.6;
  n12 = 12.5;
  n13 = 1.3;
  n14 = 0.1;
  g1 = 0.1;
  g2 = 0.01;
  g3 = 0.6;
  g4 = 0.01;
  g5 = 0.15;
  g6 = 0.3;
  g7 = 0.6;
  g8 = 0.01;
  g9 = 0.3;
  g10 = 0.5;
  g11 = 0.7;
  g12 = 0.2;
  g13 = 1;
  g14 = 0.004;
  g15 = 0.4;
  g16 = 0.3;
  m1 = 0.54;
  m2 = 0.24;
  m3 = 0.2;
  m4 = 0.2;
  m5 = 0.3;
  m6 = 0.3;
  m7 = 0.7;
  m8 = 0.4;
  m9 = 1.1;
  m10 = 1;
  m11 = 1;
  m12 = 1;
  m13 = 0.32;
  m14 = 0.4;
  m15 = 0.7;
  m16 = 0.5;
  m17 = 0.5;
  m18 = 3.4;
  m19 = 0.2;
  m20 = 0.6;
  m21 = 0.08;
  m22 = 0.1;
  m23 = 1.8;
  m24 = 0.1;
  m25 = 1.8;
  m26 = 0.5;
  m27 = 0.1;
  m28 = 20;
  m29 = 5;
  m30 = 3;
  m31 = 0.3;
  m32 = 0.2;
  m33 = 13;
  m34 = 0.6;
  m35 = 0.3;
  m36 = 0.1;
  m37 = 0.8;
  m38 = 0.5;
  m39 = 0.3;
  a = 2;
  b = 2;
  c = 2;
  d = 2;
  e = 2;
  f = 2;
  p1 = 0.13;
  p2 = 0.27;
  p3 = 0.1;
  p4 = 0.56;
  p5 = 4;
  p6 = 0.6;
  p7 = 0.3;
  p8 = 0.6;
  p9 = 0.8;
  p10 = 0.54;
  p11 = 0.51;
  p12 = 3.4;
  p13 = 0.1;
  p14 = 0.14;
  p15 = 3;
  p16 = 0.62;
  p17 = 4.8;
  p18 = 4;
  p19 = 1;
  p20 = 0.1;
  p21 = 1;
  p22 = 0.5;
  p23 = 0.37;
  p24 = 10;
  p25 = 8;
  p26 = 0.3;
  p27 = 0.8;
  p28 = 2;
  p29 = 0.1;
  p30 = 0.9;
  p31 = 0.1;
  q1 = 1.2;
  q2 = 1.56;
  q3 = 2.8;
  E34 = 1;
  Gn = 1;
  EGn = 1;
  lightOffset = 0;
  cyclePeriod = 24;
  lightAmplitude = 1;
  phase = 0;
  twilightPeriod = 0.05;
  photoPeriod = 12;
  ksY = 1;
  kdY = 0.02;
  KsS = 100;
  ksS = 2;
  kdS = 20;
  KdS = 0.5;
  KdSX = 100;
  ksX = 40;
  kdX = 100;
  ksT1 = 7.5;
  ksT2 = 14;
  kdT1 = 14.5;
  kdT2 = 0.06;
  KdT2 = 0.003;
  KsT2 = 0.4;

  // Assignment rules:
  L := lightOffset + 0.5*lightAmplitude*(1 + tanh(cyclePeriod*((time + phase)/cyclePeriod - floor(floor(time + phase)/cyclePeriod))/twilightPeriod)) - 0.5*lightAmplitude*(1 + tanh((cyclePeriod*((time + phase)/cyclePeriod - floor(floor(time + phase)/cyclePeriod)) - photoPeriod)/twilightPeriod)) + 0.5*lightAmplitude*(1 + tanh((cyclePeriod*((time + phase)/cyclePeriod - floor(floor(time + phase)/cyclePeriod)) - cyclePeriod)/twilightPeriod));
  D := 1 - L;

  // Reactions:
  cL_m_trscr: => cL_m; def*function_4_cL_m_trscr_1(L, a, cNI, cP, cP7, cP9, cT, def, g1, n1, q1);  // modifiers: cNI, cP, cP7, cP9, cT
  cL_m_degr: cL_m => ; def*function_4_cL_m_degr_1(D, L, cL_m, def, m1, m2);
  cL_trsl: => cL; def*function_4_cL_trsl_1(L, cL_m, def, p1, p2);  // modifiers: cL_m
  cL_degr: cL => ; def*function_4_cL_degr_1(c, cL, def, g3, m3, p3);
  cL_modif: => cLm; def*function_4_cL_modif_1(c, cL, def, g3, p3);  // modifiers: cL
  cLm_degr: cLm => ; def*function_4_cLm_degr_1(cLm, def, m4);
  cP_trsl: => cP; def*function_4_cP_trsl_1(D, cP, def, p7);
  cP_degr: cP => ; def*function_4_cP_degr_1(L, cP, def, m11);
  cP9_m_trscr: => cP9_m; def*function_4_cP9_m_trscr(L, cEC, cL, cP, def, e, g8, g9, n4, n7, q3);  // modifiers: cEC, cL, cP
  cP9_m_degr: cP9_m => ; def*function_4_cP9_m_degr_1(cP9_m, def, m12);
  cP9_trsl: => cP9; def*function_4_cP9_trsl_1(cP9_m, def, p8);  // modifiers: cP9_m
  cP9_degr: cP9 => ; def*function_4_cP9_degr_1(D, cP9, def, m13, m22);
  cP7_m_trscr: => cP7_m; def*function_4_cP7_m_trscr_1(cL, cLm, cP9, def, e, f, g10, g11, n8, n9);  // modifiers: cL, cLm, cP9
  cP7_m_degr: cP7_m => ; def*function_4_cP7_m_degr_1(cP7_m, def, m14);
  cP7_trsl: => cP7; def*function_4_cP7_trsl_1(cP7_m, def, p9);  // modifiers: cP7_m
  cP7_degr: cP7 => ; def*function_4_cP7_degr_1(D, cP7, def, m15, m23);
  cNI_m_trscr: => cNI_m; def*function_4_cNI_m_trscr_1(b, cLm, cP7, def, e, g12, g13, n10, n11);  // modifiers: cLm, cP7
  cNI_m_degr: cNI_m => ; def*function_4_cNI_m_degr_1(cNI_m, def, m16);
  cNI_trsl: => cNI; def*function_4_cNI_trsl_1(cNI_m, def, p10);  // modifiers: cNI_m
  cNI_degr: cNI => ; def*function_4_cNI_degr_1(D, cNI, def, m17, m24);
  cT_m_trscr: => cT_m; def*function_4_cT_m_trscr(cEC, cL, def, e, g4, g5, n2);  // modifiers: cEC, cL
  cT_m_degr: cT_m => ; def*function_4_cT_m_degr_1(cT_m, def, m5);
  cT_trsl: => cT; def*function_4_cT_trsl_1(cT_m, def, p4);  // modifiers: cT_m
  cT_degr: cT => ; def*function_4_cT_degr_1(D, cT, cZG, cZTL, def, m6, m7, m8, p5);  // modifiers: cZG, cZTL
  cE4_m_trscr: => cE4_m; def*function_4_cE4_m_trscr_1(cEC, cL, def, e, g2, g6, n13);  // modifiers: cEC, cL
  cE4_m_degr: cE4_m => ; def*function_4_cE4_m_degr_1(cE4_m, def, m34);
  cE4_trsl: => cE4; def*function_4_cE4_trsl_1(cE4_m, def, p23);  // modifiers: cE4_m
  cE4_degr: cE4 => ; def*function_4_cE4_degr_1(cCOP1d, cCOP1n, cE3n, cE4, cLUX, def, m35, m36, m37, p21, p25, p26);  // modifiers: cCOP1d, cCOP1n, cE3n, cLUX
  cE3_m_trscr: => cE3_m; def*function_4_cE3_m_trscr_1(cL, def, e, g16, n3);  // modifiers: cL
  cE3_m_degr: cE3_m => ; def*function_4_cE3_m_degr_1(cE3_m, def, m26);
  cE3_trsl: => cE3; def*function_4_cE3_trsl_1(cE3_m, def, p16);  // modifiers: cE3_m
  cE3_degr: cE3 => ; def*function_4_cE3_degr_1(cCOP1c, cE3, def, m9);  // modifiers: cCOP1c
  cE3n_import: cE3 => cE3n; def*function_4_cE3n_import_1(cE3, cE3n, def, p19, p20);
  cE3n_degr: cE3n => ; def*function_4_cE3n_degr_1(cCOP1d, cCOP1n, cE3n, cE4, cG, cLUX, def, m19, m29, m30, m36, m37, p17, p21, p25, p26, p28, p29);  // modifiers: cCOP1d, cCOP1n, cE4, cG, cLUX
  cLUX_m_trscr: => cLUX_m; def*function_4_cE4_m_trscr_1(cEC, cL, def, e, g2, g6, n13);  // modifiers: cEC, cL
  cLUX_m_degr: cLUX_m => ; def*function_4_cLUX_m_degr_1(cLUX_m, def, m34);
  cLUX_trsl: => cLUX; def*function_4_cLUX_trsl_1(cLUX_m, def, p27);  // modifiers: cLUX_m
  cLUX_degr: cLUX => ; def*function_4_cLUX_degr_1(cCOP1d, cCOP1n, cE3n, cE4, cLUX, def, m36, m37, m39, p21, p25, p26);  // modifiers: cCOP1d, cCOP1n, cE3n, cE4
  cCOP1c_trsl: => cCOP1c; def*function_4_cCOP1c_trsl_1(def, n5);
  cCOP1c_degr: cCOP1c => ; def*function_4_cCOP1c_degr_1(L, cCOP1c, def, m27, p15);
  cCOP1n_import: cCOP1c => cCOP1n; def*function_4_cCOP1n_import_1(cCOP1c, def, p6);
  cCOP1n_degr: cCOP1n => ; def*function_4_cCOP1n_degr_1(L, cCOP1n, def, m27, p15);
  cCOP1d_activ: cCOP1n => cCOP1d; def*function_4_cCOP1d_activ_1(L, cCOP1n, cP, def, n14, n6);  // modifiers: cP
  cCOP1d_degr: cCOP1d => ; def*function_4_cCOP1d_degr_1(D, cCOP1d, def, m31, m33);
  cG_m_trscr: => cG_m; def*function_4_cG_m_trscr(L, cEC, cL, cP, def, e, g14, g15, n12, q2);  // modifiers: cEC, cL, cP
  cG_m_degr: cG_m => ; def*function_4_cG_m_degr_1(cG_m, def, m18);
  cG_trsl: => cG; def*function_4_cG_trsl_1(cG_m, def, p11);  // modifiers: cG_m
  cG_degr: cG => ; def*function_4_cG_degr_1(cE3n, cG, def, m19, p17, p28, p29);  // modifiers: cE3n
  cG_cZTL_assoc: cG + cZTL -> cZG; def*function_4_cG_cZTL_assoc_1(D, L, cG, cZG, cZTL, def, p12, p13);
  cZTL_trsl: => cZTL; def*function_4_cZTL_trsl_1(def, p14);
  cZTL_degr: cZTL => ; def*function_4_cZTL_degr_1(cZTL, def, m20);
  cZG_degr: cZG => ; def*function_4_cZG_degr_1(cZG, def, m21);
  cG_cE3_assoc: cE3 + cG => cEG; def*function_4_cG_cE3_assoc_1(cE3, cG, def, p17);
  cEG_degr: cEG => ; def*function_4_cEG_degr_1(cCOP1c, cCOP1d, cCOP1n, cE3n, cEG, cG, def, m10, m19, m9, p17, p18, p28, p29, p31);  // modifiers: cCOP1c, cCOP1d, cCOP1n, cE3n, cG
  cEC_form: => cEC; def*function_4_cEC_form_1(cCOP1d, cCOP1n, cE3n, cE4, cLUX, def, m36, m37, p21, p25, p26);  // modifiers: cCOP1d, cCOP1n, cE3n, cE4, cLUX
  cEC_degr: cEC => ; def*function_4_cEC_degr_1(L, cCOP1d, cCOP1n, cE3n, cEC, cEG, cG, d, def, g7, m10, m19, m32, m36, m37, m9, p17, p18, p24, p28, p29, p31);  // modifiers: cCOP1d, cCOP1n, cE3n, cEG, cG
  Y_syn: => Y; def*function_Y_syn(L, ksY);
  Y_deg: Y => ; def*function_Y_deg(L, Y, kdY);
  T_syn: => T; def*function_T_syn(L, ksT1, ksT2, cL, cLm, KsT2);  // modifiers: cL, cLm
  T_deg: T => ; def*function_T_deg(L, kdT1, kdT2, T, KdT2);
  X_syn: => X; def*function_X_syn(ksX, S);  // modifiers: S
  X_deg: X => ; def*function_X_deg(kdX, X, T);  // modifiers: T
  S_syn: => S; def*function_S_syn(ksS, L, Y, KsS);  // modifiers: Y
  S_deg: S => ; def*function_S_deg(L, kdS, X, KdSX, S, KdS);  // modifiers: X

  // Unit definitions:
  unit volume = 1e-6 litre;
  unit time = 3600 second;
  unit substance = 1e-9 mole;
end
